; Source: NMautoverse/NMdata
; Source URL: https://github.com/NMautoverse/NMdata
; Upstream path: inst/examples/nonmem/xgxr018.mod
; Upstream license: MIT + file LICENSE
; Adaptations: renamed from .mod to .ctl; added provenance header;
; retained illustrative $DATA and output FILE= paths.
$PROBLEM    PK. Test of multiple output table formats

;@ Variables 16/20 @;
$INPUT ID NOMTIME TIME EVID CMT AMT DV FLAG STUDY BLQ
CYCLE DOSE PART PROFDAY PROFTIME WEIGHTB EFF0

$DATA     ../../../../shared_data/nmautoverse/xgxr4.csv IGNORE=@ IGNORE=(FLAG.NE.0)

$SUBROUTINE ADVAN4 TRANS4

$PK
KA=THETA(1)*EXP(ETA(1))
V2=THETA(2)*EXP(ETA(2))
CL=THETA(3)*EXP(ETA(3))
V3=THETA(4)*EXP(ETA(4))
Q=THETA(5)*EXP(ETA(5))

$ERROR
  IPRED=F
  IRES=DV-IPRED

  IF (IPRED.GT.1) THEN
    W = SQRT(IPRED**2*SIGMA(1,1)**2 + SIGMA(2,2)**2)
  ELSE
    W=1
  ENDIF

  IWRES=IRES/W
  Y=F+F*ERR(1)+ERR(2)

;-----------------------INITIAL ESTIMATES---------------------------------
$THETA  (0,0.9)           ; POPKA
$THETA  (0,4.2)             ; POPCL
$THETA  (0,3.6)             ; POPV2
$THETA  (0,5.81)             ; POPV3
$THETA  (0,3.44)           ; POPQ

$OMEGA 0.1
$OMEGA 0.1
$OMEGA 0.1
$OMEGA 0 FIX
$OMEGA 0 FIX

$SIGMA .2
$SIGMA .2

$ESTIMATION METHOD=1 POSTHOC INTER MAXEVAL=9999 NSIG=2 SIGL=9
            PRINT=10 NOABORT


;@ Pred Variables 8/20 @;
$TABLE KA  Q  FILE=xgxr018_res.txt

$TABLE ID V2 V3 FORMAT=tF13.4 FILE=xgxr018_res_vols.txt

$TABLE ID        CL        FIRSTONLY  FORMAT=,1PE15.8  FILE=xgxr018_res_fo.txt
       NOPRINT   NOAPPEND  ONEHEADER
